<?xml version='1.0' encoding='UTF-8'?>
<Lems>

  <!-- Wang-Buzsaki basket cell with classical HH Sodium, Potassium and leak conductance + current clamp to make it spike -->

    <Target component="sim1"/>

    <Include file="Cells.xml"/>
    <Include file="Networks.xml"/>
    <Include file="Simulation.xml"/>

    <Include file="WangBuzsaki.net.nml"/>

<!-- Simulation specifications -->

    <Simulation id="sim1" length="100ms" step="0.001ms" target="net1">

        <Display id="d1" title="WangBuzsaki PV and BC with 2uA/cm2 input" timeScale="1ms" xmin="-10" xmax="110" ymin="-80" ymax="40">
            <Line id="PV_B_v" quantity="popWB/0/wb1/v" scale="1mV" color="#0000ff" timeScale="1ms"/>
        </Display>

        <Display id="d2" title="gating variables" timeScale="1ms" xmin="-10" xmax="110" ymin="-0.05" ymax="1.05">
            <Line id="m_inf" quantity="popWB/0/wb1/biophys/membraneProperties/na_all/na_chan/m/inf" scale="1" color="#FF0000" timeScale="1ms" />
            <Line id="h" quantity="popWB/0/wb1/biophys/membraneProperties/na_all/na_chan/h/q" scale="1" color="#FFFF00" timeScale="1ms" />
            <Line id="h_inf" quantity="popWB/0/wb1/biophys/membraneProperties/na_all/na_chan/h/inf" scale="1" color="#00FF00" timeScale="1ms" />
            <Line id="n" quantity="popWB/0/wb1/biophys/membraneProperties/k_all/k_chan/n/q" scale="1" color="#0099FF" timeScale="1ms" />
            <Line id="n_inf" quantity="popWB/0/wb1/biophys/membraneProperties/k_all/k_chan/n/inf" scale="1" color="#0000FF" timeScale="1ms" />
        </Display>

        <OutputFile id="of0" fileName="wangbuzsaki.dat">
            <OutputColumn id="bc" quantity="popWB/0/wb1/v"/>
        </OutputFile>

    </Simulation>

</Lems>
