<Lems xmlns="http://www.neuroml.org/lems/0.6"
      xmlns:xsi="http://www.w3.org/2001/XMLSchema-instance"
      xsi:schemaLocation="http://www.neuroml.org/lems/0.6 https://raw.github.com/LEMS/LEMS/master/Schemas/LEMS/LEMS_v0.6.xsd">

<!-- Definition in LEMS of a new ComponentType for the Wang & Buzsáki 1996 model in Wang XJ and Buzsáki Gy (1996) -->

<ComponentType name="wangBuzsakiBasketCell"
               extends="baseCellMembPot"
               description="Cell based on Wang XJ and Buzsáki Gy (1996)">

        <!-- TODO: add synapses !!! -->

        <Parameter name="r" dimension="length"/>
        <Parameter name="C" dimension="specificCapacitance"/>
        <Parameter name="v0" dimension="voltage"/>

        <!-- leak conductance -->
        <Parameter name="gL" dimension="conductanceDensity"/>
        <Parameter name="eL" dimension="voltage"/>

        <!-- Na+ channel -->
        <Parameter name="gNa" dimension="conductanceDensity"/>
        <Parameter name="eNa" dimension="voltage"/>
        <Parameter name="alpham_rate" dimension="per_time"/>
        <Parameter name="alpham_midpoint" dimension="voltage"/>
        <Parameter name="alpham_scale" dimension="voltage"/>
        <Parameter name="betam_rate" dimension="per_time"/>
        <Parameter name="betam_midpoint" dimension="voltage"/>
        <Parameter name="betam_scale" dimension="voltage"/>
        <Parameter name="h_q" dimension="none"/>
        <Parameter name="alphah_rate" dimension="per_time"/>
        <Parameter name="alphah_midpoint" dimension="voltage"/>
        <Parameter name="alphah_scale" dimension="voltage"/>
        <Parameter name="betah_rate" dimension="per_time"/>
        <Parameter name="betah_scale" dimension="voltage"/>
        <Parameter name="betah_midpoint" dimension="voltage"/>

        <!-- K+ channel -->
        <Parameter name="gK" dimension="conductanceDensity"/>
        <Parameter name="eK" dimension="voltage"/>
        <Parameter name="n_q" dimension="none"/>
        <Parameter name="alphan_rate" dimension="per_time"/>
        <Parameter name="alphan_midpoint" dimension="voltage"/>
        <Parameter name="alphan_scale1" dimension="voltage"/>
        <Parameter name="alphan_scale2" dimension="voltage"/>
        <Parameter name="betan_rate" dimension="per_time"/>
        <Parameter name="betan_midpoint" dimension="voltage"/>
        <Parameter name="betan_scale" dimension="voltage"/>
        <Parameter name="spikeThresh" dimension="voltage"/>

        <Attachments name="synapses" type="basePointCurrent"/>

        <Exposure name="m_inf" dimension="none"/>
        <Exposure name="h" dimension="none"/>
        <Exposure name="h_inf" dimension="none"/>
        <Exposure name="n" dimension="none"/>
        <Exposure name="n_inf" dimension="none"/>
        <Exposure name="iSyn" dimension="current" description="Total current due to synaptic inputs"/>
        <Exposure name="spiking" dimension="none"/>

        <Dynamics>

            <!-- baseCellMembPot compatibility -->
            <StateVariable name="v" dimension="voltage" exposure="v"/>

            <StateVariable name="h" dimension="none" exposure="h"/>
            <StateVariable name="n" dimension="none" exposure="n"/>
            <StateVariable name="spiking" exposure="spiking" dimension="none"/>

            <!-- chanel kinetics -->
            <DerivedVariable name="tmp" dimension="none" value="(v-alpham_midpoint)/alpham_scale"/>
            <DerivedVariable name="alpham" dimension="per_time" value="(alpham_rate*tmp)/(1-exp(0-tmp))"/>
            <DerivedVariable name="betam" dimension="per_time" value="betam_rate*exp((v-betam_midpoint)/(betam_scale))"/>
            <DerivedVariable name="m_inf" dimension="none" value="alpham/(alpham+betam)" exposure="m_inf"/>
            <DerivedVariable name="alphah" dimension="per_time" value="alphah_rate*exp((v-alphah_midpoint)/(alphah_scale))"/>
            <DerivedVariable name="betah" dimension="per_time" value="betah_rate/(exp((v-betah_midpoint)/betah_scale)+1)"/>
            <DerivedVariable name="h_inf" dimension="none" value="alphah/(alphah+betah)" exposure="h_inf"/>
            <DerivedVariable name="alphan" dimension="per_time" value="(alphan_rate*(v-alphan_midpoint)/alphan_scale1)/(1-exp(0-(v-alphan_midpoint)/alphan_scale2))"/>
            <DerivedVariable name="betan" dimension="per_time" value="betan_rate*exp((v-betan_midpoint)/(betan_scale))"/>
            <DerivedVariable name="n_inf" dimension="none" value="alphan/(alphan+betan)" exposure="n_inf"/>
            <DerivedVariable name="surface" dimension="area" value="4*3.1415926*r*r"/>
            <DerivedVariable name="C_total" dimension="capacitance" value="C*surface"/>
            <DerivedVariable name="iSyn" dimension="current" exposure="iSyn" select="synapses[*]/i" reduce="add" />

            <!-- TODO: implement synaptic currents -->
            <TimeDerivative variable="v" value="(-gL*(v-eL)-gNa*m_inf^3*h*(v-eNa)-gK*n^4*(v-eK))/(C_total/surface)+iSyn/C_total"/>
            <TimeDerivative variable="h" value="h_q*(alphah*(1-h)-betah*h)"/>
            <TimeDerivative variable="n" value="n_q*(alphan*(1-n)-betan*n)"/>

            <OnStart>
                <StateAssignment variable="v" value="v0"/>
                <StateAssignment variable="h" value="h_inf"/>
                <StateAssignment variable="n" value="n_inf"/>
                <StateAssignment variable="spiking" value="0"/>
            </OnStart>

            <OnCondition test="v .gt. spikeThresh .and. spiking .lt. 0.5">
                <StateAssignment variable="spiking" value="1"/>
                <EventOut port="spike"/>
            </OnCondition>

            <OnCondition test="v .lt. spikeThresh">
                <StateAssignment variable="spiking" value="0"/>
            </OnCondition>

        </Dynamics>

    </ComponentType>

</Lems>
